// SBML level 2 version 4

function function(kcat, E, substrate, Km)
  kcat*E*substrate/(substrate + Km);
end

function Constant_flux__irreversible(v)
  v;
end
Constant_flux__irreversible is "Constant flux (irreversible)";

function Hill_Cooperativity(substrate, Shalve, V, h)
  V*substrate^h/(Shalve^h + substrate^h);
end

model New_Model()

  // Compartments:
  compartment Cell = 1;

  // Species:
  species Substrate in Cell = 0.01;
  species Product in Cell = 0;
  species Co_product in Cell = 0.01; Co_product is "Co-product";
  species Enzyme in Cell = 0;
  species Inducer in Cell = 0.001;
  species Activated_promoter in Cell = 0;

  // Reactions:
  Induction: Inducer => Activated_promoter; Cell*Hill_Cooperativity(Inducer, Shalve, V, h);
    Shalve = 0.1; V = 1000; h = 4;
  Expression: Activated_promoter => Enzyme; Cell*Expression_k1*Activated_promoter;
    Expression_k1 = 1000000;
  Leakage: => Enzyme; Cell*Constant_flux__irreversible(v);
    v = 1e-9;
  Degradation: Enzyme => ; Cell*Degradation_k1*Enzyme;
    Degradation_k1 = 1e-6;
  Catalysis: Substrate => Product + Co_product; Cell*function(kcat, Enzyme, Substrate, Km);  // modifiers: Enzyme
    kcat = 0.1; Km = 0.1;
end
