// SBML level 2 version 4

function Constant_flux__irreversible(v)
  v;
end
Constant_flux__irreversible is "Constant flux (irreversible)";

function Henri_Michaelis_Menten__irreversible(substrate, Km, V)
  V*substrate/(Km + substrate);
end
Henri_Michaelis_Menten__irreversible is "Henri-Michaelis-Menten (irreversible)";

function Hill_Cooperativity(substrate, Shalve, V, h)
  V*(substrate/Shalve)^h/(1 + (substrate/Shalve)^h);
end

model New_Model()

  // Compartments:
  compartment Cell = 1;

  // Species:
  species Substrate in Cell = 0.01;
  species Product in Cell = 0;
  species Co_product in Cell = 0.01; Co_product is "Co-product";
  species Enzyme in Cell = 0.02;
  species Inducer in Cell = 0.001;
  species Activated_promoter in Cell = 0;

  // Reactions:
  Induction: Inducer => Activated_promoter; Cell*Hill_Cooperativity(Inducer, Shalve, Induction_V, h);
    Shalve = 0.001; Induction_V = 1000000; h = 4;
  Expression: Activated_promoter => Enzyme; Cell*Expression_k1*Activated_promoter;
    Expression_k1 = 0.01;
  Leakage: => Enzyme; Cell*Constant_flux__irreversible(v);
    v = 0.0001;
  Degradation: Enzyme => ; Cell*Degradation_k1*Enzyme;
    Degradation_k1 = 100;
  Catalysis: Substrate => Product + Co_product; Cell*Henri_Michaelis_Menten__irreversible(Substrate, Km, Catalysis_V);  // modifiers: Enzyme
    Km = 0.1; Catalysis_V = 0.1;
end
